Aviao generico (teste do zero: AVL -> esquema -> malha)
0.0
0 0 0.0
16.0   1.2   10.0
0.30  0.0  0.0
#
SURFACE
Asa
10 1.0 12 -2.0
YDUPLICATE
0.0
ANGLE
2.0
SECTION
0.0 0.0 0.0 1.6 0.0
NACA
2412
SECTION
0.35 5.0 0.2 1.0 0.0
NACA
2412
#
SURFACE
Profundor
6 1.0 8 1.0
YDUPLICATE
0.0
TRANSLATE
4.6 0.0 0.5
SECTION
0.0 0.0 0.0 0.8 0.0
NACA
0012
SECTION
0.15 2.0 0.0 0.5 0.0
NACA
0012
#
SURFACE
Deriva
6 1.0 8 1.0
TRANSLATE
4.8 0.0 0.5
SECTION
0.0 0.0 0.0 1.0 0.0
NACA
0012
SECTION
0.4 0.0 1.4 0.6 0.0
NACA
0012
